// COMSOL Multiphysics 5.6.0.341 model "MultiOrganoidOnAChipNoResults.mph"
// Outline of the model tree
// Components: comp3 "Perfused Millifluidic Device", comp4 "Spinner Flask Perfect Mixing", comp5 "Static Well Plate 2 Organoids"

Parameters
  hc = 0.002[m]  // inlet diameter
  h_inlet = 5.5[mm]  // inlet height
  r_org = 0.958E-3[m]  // organoid radius
  x_offset = 0[mm]  // Organoid distance from original placement
  h_org = 3.01[mm]  // height of organoid base
  dishdiam = 35[mm]  // diameter of well
  V_media = 3[ml]  // Volume of media in well plate
  basearea = (dishdiam/2)^2*pi  // base area of well
  h_media = V_media/basearea  // height of media in well
  V_in = 1.25[ml/hour]  // Inlet Flow
  A_in = pi*(hc/2)^2  // inlet area
  v_in = V_in/A_in  // inlet velocity
  D_P = 3.4e-9[m^2/s]  // Diffusion Constant O2 through PDMS
  c_inlet = 0.186[mol/m^3]  // O2 Conc in Media (saturated in air)
  c_inc = 1.49[mol/m^3]  // surface PDMS conc
  V_max = 0.0036[mol/(m^3*s)]  // Max O2 Consumption Rate (approximation)
  K_m = 0.5e-3[mol/m^3]  // Michaelis-Menten constant for O3 consumption
  c_hypox = 0.05[mM]  // concentration of O2 for Hypoxic Tissue
  w = 0.01  // width for flc2hs
  c_unit = 1[mM]  // makes heaviside function unitless
  c_unit1 = 1[mM/mm]  // unit value
  v_spr = 10000[m/s]  // spring speed
  K_p = c_inc/c_inlet  // partition coefficient PDMS:Media

Variables
  var1 "PDMS Concentration" [comp3] on domains 1
    c = c_PDMS
  var2 "Media and Organoids Concentration" [comp3] on domains 2-6
    c = c_media

Couplings
  intop1: Integration "PMF Organoid Integration 1" on domains 3
  intop2: Integration "PMF Organoid Integration 2" on domains 6
  intop3: Integration "SF Organoid Integration" on domains 1
  intop4: Integration on domains 2
  intop5: Integration on domains 3

Coordinate systems
  sys3: Boundary "Boundary System 2" [geom3]
  sys4: Boundary "Boundary System 4" [geom4]
  sys5: Boundary "Boundary System 5" [geom5]

Geometry
  geom3 "Geometry 3" [comp3] (3D, length unit mm)
    wp1: WorkPlane | quickplane = zx; quicky = 5; unite = on
      c1: Circle | pos = {h_inlet, 0}
    ext1: Extrude | workplane = wp1; input = wp1; distance = 8
    mir1: Mirror | input = ext1; keep = on; axis = {0, 1, 0}
    wp2: WorkPlane | quickz = 3; unite = on
      r1: Rectangle | pos = {-5, -5}; size = {10, 10}
    ext2: Extrude | workplane = wp2; input = wp2; distance = 7; scale = {1.31258317893, 1.31258317893}
    uni1: Union | input = ext1, ext2, mir1; intbnd = off; face = all
    cone1: Cone | pos = {0, 2.4, 3}; r = 1.05; h = 1.5; ang = 12
    cone2: Cone | pos = {1.72 + x_offset, 1.97, 3}; ax2 = {0.0, 0.0}; r = 0.65; h = 1.5; ang = 12
    cone3: Cone | pos = {2.9 + x_offset, 1.34, 3}; r = 0.66; h = 1.5; ang = 12
    cone5: Cone | pos = {0.86 + x_offset, 1.23, 3}; r = 0.25; ang = 9
    cone6: Cone | pos = {0.62 + x_offset, 0.62, 3}; r = 0.25; ang = 9
    cone7: Cone | pos = {3.64 + x_offset, 0, 3}; ax2 = {0.0, 0.0}; r = 0.835; h = 1.5; ang = 12
    mir2: Mirror | input = cone1, cone2, cone3, cone5, cone6; keep = on; axis = {0, 1, 0}
    mir3: Mirror
      input = cone2, cone3, cone5, cone6, cone7, mir2(2), mir2(3), mir2(4), mir2(5)
      keep = on
      axis = {1, 0, 0}
    dif1: Difference | input = uni1; input2 = cone1, cone2, cone3, cone5, cone6, cone7, mir2, mir3
    pyr1: Pyramid | a = 25; b = 25; h = 15; rat = 0.74493
    pyr2: Pyramid | pos = {0, 0, 10}; a = 25; b = 25; h = 10; rat = 1.1555
    uni2: Union | input = pyr1, pyr2; intbnd = off; face = all
    dif3: Difference | input = uni2; input2 = dif1; keep = on
    sph1: Sphere | pos = {-1.75 - x_offset, 0, h_org + r_org}; r = r_org
    sph2: Sphere | pos = {1.75 + x_offset, 0, h_org+r_org}; r = r_org
    fin: Finalize "Form Union"
  geom4 "Geometry 4" [comp4] (3D, length unit mm)
    sph1: Sphere | r = r_org
    fin: Finalize "Form Union"
  geom5 "Geometry 5" [comp5] (3D, length unit mm)
    cyl1: Cylinder | pos = {0, 0, 3}; r = dishdiam/2; h = h_media
    sph1: Sphere | pos = {-5.83, 0, 3.01 +r_org}; r = r_org
    sph2: Sphere | pos = {5.833, 0, 3.01 +r_org}; r = r_org
    fin: Finalize "Form Union"

Materials
  mat2: Common "Water, liquid" [comp3] on domains 2, 4, 5
    def "Basic"
      thermalexpansioncoefficient = alpha_p(T)
      bulkviscosity = muB(T)
      dynamicviscosity = eta(T)
      ratioofspecificheat = gamma_w(T)
      electricconductivity = 5.5e-6[S/m]
      heatcapacity = Cp(T)
      density = rho(T)
      thermalconductivity = k(T)
      soundspeed = cs(T)
      eta: Piecewise
        arg = T
        pieces = 
          {273.15, 413.15, 1.3799566804-0.021224019151*T^1+1.3604562827E-4*T^2-4.6454090319E-7*T^3+8.9042735735E-10*T^4-9.0790692686E-13*T^5+3.8457331488E-16*T^6}
          {413.15, 553.75, 0.00401235783-2.10746715E-5*T^1+3.85772275E-8*T^2-2.39730284E-11*T^3}
        argunit = K
        fununit = Pa*s
      Cp: Piecewise | arg = T; pieces = {273.15, 553.75, 12010.1471-80.4072879*T^1+0.309866854*T^2-5.38186884E-4*T^3+3.62536437E-7*T^4}; argunit = K; fununit = J/(kg*K)
      rho: Piecewise
        arg = T
        smooth = contd1
        pieces = 
          {273.15, 293.15, 6.3092789034e-05*T^3-0.0603676398829*T^2+18.9229382407066*T-950.704055329848}
          {293.15, 373.15, 1.0335053319e-05*T^3-0.0133950656345*T^2+4.96928883266*T+432.257114008512}
        argunit = K
        fununit = kg/m^3
      k: Piecewise | arg = T; pieces = {273.15, 553.75, -0.869083936+0.00894880345*T^1-1.58366345E-5*T^2+7.97543259E-9*T^3}; argunit = K; fununit = W/(m*K)
      cs: Interpolation | table = {{273, 1403}, {278, 1427}, {283, 1447}, {293, 1481}, {303, 1507}, {313, 1526}, {323, 1541}, {333, 1552}, {343, 1555}, {353, 1555}, {363, 1550}, {373, 1543}}; interp = piecewisecubic; argunit = K; fununit = m/s
      an1: Analytic | funcname = alpha_p; expr = -1/rho(T)*d(rho(T),T); args = T; argunit = K; fununit = 1/K
      an2: Analytic | funcname = gamma_w; expr = 1+(T/Cp(T))*(alpha_p(T)*cs(T))^2; args = T; argunit = K; fununit = 1
      an3: Analytic | funcname = muB; expr = 2.79*eta(T); args = T; argunit = K; fununit = Pa*s
  mat3: Common "Organoid Tissue" [comp3] on domains 3, 6
    def "Basic"
      density = 1050
      diffusion = 1.7e-9
      dynamicviscosity = 0.001
  mat4: Common "PDMS" [comp3] on domains 1
    def "Basic"
      density = 1.03[g/cm^3]
      diffusion = D_P
      dynamicviscosity = 0
  mat5: Common "Organoid Tissue" [comp4] on all domains
    def "Basic"
      density = 1050
      diffusion = 1.7e-9
      dynamicviscosity = 0.001
  mat6: Common "Water, liquid" [comp5] on domains 1
    // same settings as mat2
  mat7: Common "Organoid Tissue" [comp5] on domains 2, 3
    def "Basic"
      density = 1050
      diffusion = 1.7e-9
      dynamicviscosity = 0.001

Physics
  spf2: LaminarFlow "Laminar Flow in Device" [geom3] on domains 2, 4, 5
    dependent variable u = {u, v, w}
    fp1: FluidProperties (default)
    init1: init "Initial Values 1" (default)
    wallbc1: WallBC "Wall 1" (default)
    inl1: InletBoundary "Inlet 1" on boundaries 58
      BoundaryCondition = FullyDevelopedFlow
      U0in = 0.11
      FullyDevelopedFlowOption = V0
      V0fdf = V_in
    out1: OutletBoundary "Outlet 1" on boundaries 67
    iwbc1: InteriorWallBC "Interior Wall 1" on boundaries 30-33
  tds: DilutedSpecies "Oxygen TDS in PDMS" [geom3] on domains 1
    dependent variable c_PDMS
    cdm1: ConvectionDiffusionMigration "Transport Properties 1" (default)
      u_src = root.comp3.u
      DiffusionMaterialList = mat2
      D_c_PDMS = 3.0e-9[m^2/s]
    nflx1: NoFlux (default)
    init1: init "Initial Values 1" (default) | initc = c_inc-0.001
    conc1: Concentration on boundaries 1-9, 152, 153 | species = 1; c0 = c_inc
    cdm3: ConvectionDiffusionMigration "Transport Properties PDMS" on domains 1
      DiffusionMaterialList = mat4
      D_c_PDMS = D_P
    fl1: FluxBoundary "Stiff Spring PDMS Side" (disabled) on boundaries 10-29, 34-39, 44-55, 58-63, 66-85, 88-95, 98-113, 118-131, 136-151
      species = 1
      J0 = v_spr*(c_media-c_PDMS/K_p)
    in1: Inflow on boundaries 58 | c0 = c_inlet
    out1: Outflow on boundaries 67
  tds2: DilutedSpecies "Oxygen TDS Perfect Mixing" [geom4] on all domains
    dependent variable c2
    cdm1: ConvectionDiffusionMigration "Transport Properties 1" (default) | DiffusionMaterialList = mat3; D_c2_mat = def
    nflx1: NoFlux (default)
    init1: init "Initial Values 1" (default) | initc = c_inlet-0.001
    conc1: Concentration on boundaries 1-8 | species = 1; c0 = c_inlet
    reac1: Reactions on domains 1 | R_c2 = -(V_max*c2)/(c2+K_m)*flc2hs(c2/c_hypox-1,0.01)
  tds3: DilutedSpecies "Oxygen TDS in Wells" [geom5] on all domains
    dependent variable c3
    cdm1: ConvectionDiffusionMigration "Transport Properties 1" (default)
      DiffusionMaterialList = mat2
      D_c3 = 3.25e-9[m^2/s]
    nflx1: NoFlux (default)
    init1: init "Initial Values 1" (default) | initc = c_inlet-0.001
    conc1: Concentration on boundaries 4 | species = 1; c0 = c_inlet
    reac1: Reactions on domains 2, 3 | R_c3 = -(V_max*c3)/(c3+K_m)*flc2hs(c3/c_hypox-1,w)
    cdm2: ConvectionDiffusionMigration "Transport Properties Organoids" on domains 2, 3
      DiffusionMaterialList = mat3
      D_c3_mat = def
    init2: init "Initial Values 2" on domains 2, 3 | initc = c_inlet-0.001
  tds4: DilutedSpecies "Oxygen TDS in Media & Organoids" [geom3] on domains 2-6
    dependent variable c_media
    cdm1: ConvectionDiffusionMigration "Transport Properties 1" (default)
      u_src = root.comp3.u
      DiffusionMaterialList = mat2
      D_c_media = 3.4e-9
    nflx1: NoFlux (default)
    init1: init "Initial Values 1" (default) | initc = c_inlet - 0.001
    fl1: FluxBoundary "Stiff Spring Media Side" (disabled) on boundaries 10-29, 34-39, 44-55, 59, 60, 62, 63, 68-85, 88-95, 98-113, 118-131, 136-151
      species = 1
      J0 = v_spr*(c_PDMS/K_p-c_media)
    in1: Inflow on boundaries 58 | c0 = c_inlet
    out1: Outflow on boundaries 67
    reac1: Reactions on domains 3, 6 | R_c_media = -(V_max*c)/(c+K_m)*flc2hs(c/c_hypox-1, 0.05)
    cdm2: ConvectionDiffusionMigration "Transport Properties Organoids" on domains 3, 6
      DiffusionMaterialList = mat6
      D_c_media = 3.25e-9[m^2/s]

Mesh
  mesh3 "Mesh 3" [geom3]
    size: MeshSizeDefault | hmax = 2.89; hmin = 0.52; hcurve = 0.6; hnarrow = 0.5; hgrad = 1.5
    size1: Size "Size 1 General" on domains 1, 2, 4, 5 | table = cfd; hgrad = 1.5; hauto = 3; custom = on; hmax = 1
    size2: Size on domains 3, 6 | hmax = 0.1; hgrad = 1.5; hauto = 1; custom = on
    size4: Size on boundaries 7, 9-29, 34-39, 44-55, 59, 60, 62, 63, 68-85, 88-95, 98-113, 118-131, 136-151
      hmax = 0.1
      custom = on
    size3: Size on edges 17-58, 63-74, 83-109, 112-122, 125-171, 173, 175-180, 182-200, 203-221, 223-238, 243-282, 291-332
      hmax = 0.05
      custom = on
    cr1: CornerRefinement on entire geometry
    ftet1: FreeTet "Free Tetrahedral 1" on remaining entities
    bl2: BndLayer "Boundary Layers 2" on no domains | sharpcorners = trim
      blp: BndLayerProp "Boundary Layer Properties" on boundaries 30-33 | inittype = blhmin; blhmin = 0.005
  mesh4 "Mesh 4" [geom4]
    size: MeshSizeDefault | hauto = 1
    ftet1: FreeTet "Free Tetrahedral 1" on remaining entities
  mesh5 "Mesh 5" [geom5]
    size: MeshSizeDefault | hauto = 2; custom = on
    size1: Size on domains 2, 3 | hmax = 0.05; hgrad = 1.5; hauto = 1; custom = on
    ftet1: FreeTet "Free Tetrahedral 1" on remaining entities

Studies
  std25 "SF Perfect Mixing"
    stat: Stationary | solve for = {tds2}
  std26 "SWP 2 Organoids"
    stat: Stationary | solve for = {tds3}; mesh = {geom3, nomesh, geom4, nomesh, geom5, mesh5}
  std27 "PMF"
    stat: Stationary | solve for = {spf2, tds, tds4}
  std30 "SF Organoid Size Parameter Sweep"
    param: Parametric "Parametric Sweep" | pname = r_org; plistarr = range(0.25,0.05,1); punit = mm
    stat: Stationary | solve for = {tds2}
  std31 "SWP Organoid Size Parameter Sweep"
    param: Parametric "Parametric Sweep" | pname = r_org; plistarr = range(0.25,0.05,1); punit = mm
    stat: Stationary | solve for = {tds3}; mesh = {geom3, nomesh, geom4, nomesh, geom5, mesh5}
  std32 "PMF Organoid Size Parameter Sweep"
    param: Parametric "Parametric Sweep" | pname = r_org; plistarr = range(0.25,0.05,1); punit = mm
    stat: Stationary | solve for = {spf2, tds, tds4}; mesh = {geom3, mesh3, geom4, nomesh, geom5, nomesh}
  std28 "PMF PDMS Diffusion"
    param: Parametric "Parametric Sweep" | sweeptype = filled; pname = V_in; plistarr = range(0, 0.25, 3); punit = ml/hour
    stat: Stationary | solve for = {spf2, tds, tds4}; mesh = {geom3, mesh3, geom4, nomesh, geom5, nomesh}
  std29 "PMF Polystyrene No Diffusion"
    param: Parametric "Parametric Sweep"
      sweeptype = filled
      pname = {D_P, V_in}
      plistarr = {1e-12, range(0,0.25,3)}
      punit = {m^2/s, ml/hour}
    stat: Stationary | solve for = {spf2, tds, tds4}; mesh = {geom3, mesh3, geom4, nomesh, geom5, nomesh}

Solver configurations
  sol65 "Solution 65" (study std25)
    v1: Variables "Dependent Variables 1"
    s1: Stationary "Stationary Solver 1"
      fc1: FullyCoupled | linsolver = i1; initstep = 0.01; minstep = 1.0E-6; maxiter = 50
      i1: Iterative "AMG, concentrations (tds2)" | nlinnormuse = on; maxlinit = 1000
        mg1: Multigrid | prefun = saamg; maxcoarsedof = 50000; saamgcompwise = on
  sol66 "Solution 66" (study std26)
    v1: Variables "Dependent Variables 1"
    s1: Stationary "Stationary Solver 1"
      fc1: FullyCoupled | linsolver = i1; dtech = const; maxiter = 1000; damp = .1
      i1: Iterative "AMG, concentrations (tds3)" | nlinnormuse = on; maxlinit = 1000
        mg1: Multigrid | prefun = saamg; maxcoarsedof = 50000; saamgcompwise = on
  sol67 "Solution 67" (study std27)
    v1: Variables "Dependent Variables 1"
    s1: Stationary "Stationary Solver 1"
      se1: Segregated | maxsegiter = 150
        ss1: SegregatedStep "Velocity u, Pressure p"
          segvar = {comp3_u, comp3_p, comp3_spf2_inl1_Pinlfdf}
          linsolver = i1
          subdamp = 0.5
        ss2: SegregatedStep "Concentration c_PDMS"
          segvar = {comp3_c_PDMS}
          linsolver = i2
          subdamp = 0.35
          subtermconst = itertol
          subiter = 3
          subntolfact = 1
        ss3: SegregatedStep "Concentration c_media"
          segvar = {comp3_c_media}
          linsolver = i3
          subdamp = 0.35
          subtermconst = itertol
          subiter = 3
          subntolfact = 1
      i1: Iterative "AMG, fluid flow variables (spf2)" | nlinnormuse = on; maxlinit = 1000; rhob = 20
        mg1: Multigrid | prefun = saamg; maxcoarsedof = 80000; strconn = 0.02; saamgcompwise = on
      i2: Iterative "AMG, concentrations (tds)" | nlinnormuse = on; maxlinit = 1000
        mg1: Multigrid | prefun = saamg; maxcoarsedof = 50000; saamgcompwise = on
      i3: Iterative "AMG, concentrations (tds4)" | nlinnormuse = on; maxlinit = 1000
        mg1: Multigrid | prefun = saamg; maxcoarsedof = 50000; saamgcompwise = on
  sol68 "Solution 68" (study std28)
    v1: Variables "Dependent Variables 1"
    s1: Stationary "Stationary Solver 1"
      p1: Parametric
        sweeptype = filled
        pname = V_in
        plistarr = range(0, 0.25, 3)
        punit = ml/hour
        pcontinuationmode = no
      se1: Segregated | maxsegiter = 150
        ss1: SegregatedStep "Velocity u, Pressure p"
          segvar = {comp3_u, comp3_p, comp3_spf2_inl1_Pinlfdf}
          linsolver = i1
          subdamp = 0.5
        ss2: SegregatedStep "Concentration c_PDMS"
          segvar = {comp3_c_PDMS}
          linsolver = i2
          subdamp = 0.35
          subtermconst = itertol
          subiter = 3
          subntolfact = 1
        ss3: SegregatedStep "Concentration c_media"
          segvar = {comp3_c_media}
          linsolver = i3
          subdamp = 0.35
          subtermconst = itertol
          subiter = 3
          subntolfact = 1
      i1: Iterative "AMG, fluid flow variables (spf2)" | nlinnormuse = on; maxlinit = 1000; rhob = 20
        mg1: Multigrid | prefun = saamg; maxcoarsedof = 80000; strconn = 0.02; saamgcompwise = on
      i2: Iterative "AMG, concentrations (tds)" | nlinnormuse = on; maxlinit = 1000
        mg1: Multigrid | prefun = saamg; maxcoarsedof = 50000; saamgcompwise = on
      i3: Iterative "AMG, concentrations (tds4)" | nlinnormuse = on; maxlinit = 1000
        mg1: Multigrid | prefun = saamg; maxcoarsedof = 50000; saamgcompwise = on
  sol69 "Solution 69" (study std29)
    v1: Variables "Dependent Variables 1"
    s1: Stationary "Stationary Solver 1"
      p1: Parametric
        sweeptype = filled
        pname = {D_P, V_in}
        plistarr = {1e-12, range(0,0.25,3)}
        punit = {m^2/s, ml/hour}
        pcontinuationmode = no
      se1: Segregated | maxsegiter = 150
        ss1: SegregatedStep "Velocity u, Pressure p"
          segvar = {comp3_u, comp3_p, comp3_spf2_inl1_Pinlfdf}
          linsolver = i1
          subdamp = 0.5
        ss2: SegregatedStep "Concentration c_PDMS"
          segvar = {comp3_c_PDMS}
          linsolver = i2
          subdamp = 0.35
          subtermconst = itertol
          subiter = 3
          subntolfact = 1
        ss3: SegregatedStep "Concentration c_media"
          segvar = {comp3_c_media}
          linsolver = i3
          subdamp = 0.35
          subtermconst = itertol
          subiter = 3
          subntolfact = 1
      i1: Iterative "AMG, fluid flow variables (spf2)" | nlinnormuse = on; maxlinit = 1000; rhob = 20
        mg1: Multigrid | prefun = saamg; maxcoarsedof = 80000; strconn = 0.02; saamgcompwise = on
      i2: Iterative "AMG, concentrations (tds)" | nlinnormuse = on; maxlinit = 1000
        mg1: Multigrid | prefun = saamg; maxcoarsedof = 50000; saamgcompwise = on
      i3: Iterative "AMG, concentrations (tds4)" | nlinnormuse = on; maxlinit = 1000
        mg1: Multigrid | prefun = saamg; maxcoarsedof = 50000; saamgcompwise = on
  sol70 "Solution 70" (study std30)
    // same settings as sol65
  sol71 "Parametric Solutions 3" (study std30)
  sol78 "Solution 78" (study std31)
    v1: Variables "Dependent Variables 1"
    s1: Stationary "Stationary Solver 1"
      fc1: FullyCoupled | linsolver = i1; dtech = const; maxiter = 1000; damp = 0.1
      i1: Iterative "AMG, concentrations (tds3)" | nlinnormuse = on; maxlinit = 1000
        mg1: Multigrid | prefun = saamg; maxcoarsedof = 50000; saamgcompwise = on
  sol79 "Parametric Solutions 5" (study std31)
  sol98 "Solution 98" (study std32)
    // same settings as sol67
  sol99 "Parametric Solutions 1" (study std32)

Datasets
  dset49: Solution | solution = sol65
  dset50: Solution | solution = sol65
  dset51: Solution | solution = sol65
  dset52: Solution | solution = sol66
  dset53: Solution | solution = sol66
  dset54: Solution | solution = sol66
  dset55: Solution | solution = sol67
  dset56: Solution | solution = sol67
  dset57: Solution | solution = sol67
  dset58: Solution | solution = sol68
  dset59: Solution | solution = sol68
  dset60: Solution | solution = sol68
  dset61: Solution | solution = sol69
  dset62: Solution | solution = sol69
  dset63: Solution | solution = sol69
  dset64: Solution | solution = sol70
  dset65: Solution | solution = sol70
  dset66: Solution | solution = sol70
  dset67: Solution | solution = sol71
  dset68: Solution | solution = sol71
  dset69: Solution | solution = sol71
  dset70: Solution | solution = sol78
  dset71: Solution | solution = sol78
  dset72: Solution | solution = sol78
  dset73: Solution | solution = sol79
  dset74: Solution | solution = sol79
  dset75: Solution | solution = sol79
  dset76: Solution | solution = sol98
  dset77: Solution | solution = sol98
  dset78: Solution | solution = sol98
  dset79: Solution | solution = sol99
  dset80: Solution | solution = sol99
  dset81: Solution | solution = sol99
  cpl2: CutPlane "PMF Cut Plane PDMS Diffusion" | data = dset58; quickx = -1.75
  cln2: CutLine2D "PMF Cut Line PDMS Diffusion Organoid Only"
    data = cpl2
    genpoints = {{0, h_org}, {0, 2*r_org+h_org}}
    spacevars = cln1x
    normal = {cln1nx, cln1ny}
  cln3: CutLine2D "PMF Cut Line PDMS Diffusion Whole Device"
    data = cpl2
    genpoints = {{0, 0}, {0, 20}}
    spacevars = cln1x
    normal = {cln1nx, cln1ny}
  cpl3: CutPlane "PMF Cut Plane PS No Diffusion"
    data = dset61
    quickx = -1.75
    spacevars = {cpl2x, cpl2y}
    normal = {cpl2nx, cpl2ny, cpl2nz}
  cln4: CutLine2D "PMF Cut Line PS No Diffusion Organoid Only"
    data = cpl3
    genpoints = {{0, h_org}, {0, 2*r_org+h_org}}
    spacevars = cln1x
    normal = {cln1nx, cln1ny}
  cln5: CutLine2D "PMF Cut Line PS No Diffusion Whole Device"
    data = cpl3
    genpoints = {{0, 0}, {0, 20}}
    spacevars = cln1x
    normal = {cln1nx, cln1ny}
  cpl4: CutPlane "PMF Cut Plane Radius Sweep"
    data = dset79
    quickx = -1.75
    spacevars = {cpl2x, cpl2y}
    normal = {cpl2nx, cpl2ny, cpl2nz}
  cln6: CutLine2D "PMF Cut Line Radius Sweep Organoid Only"
    data = cpl4
    genpoints = {{0, h_org}, {0, 2*r_org+h_org}}
    spacevars = cln1x
    normal = {cln1nx, cln1ny}
  cln7: CutLine2D "PMF Cut Line Radius Sweep Whole Device"
    data = cpl4
    genpoints = {{0, 0}, {0, 20}}
    spacevars = cln1x
    normal = {cln1nx, cln1ny}

Derived values
  gev21: EvalGlobal "SF Simulated Percent Hypoxia" | data = dset50; expr = intop3(c2<=c_hypox)/intop3(1); unit = 1
  gev22: EvalGlobal "SWP Simulated Percent Hypoxia" | data = dset54; expr = intop4(c3<=c_hypox)/intop4(1); unit = 1
  gev23: EvalGlobal "PMF Simulated Percent Hypoxia" | data = dset55; expr = intop1(c<=c_hypox)/intop1(1); unit = 1
  gev24: EvalGlobal "PMF PDMS Diffusion Simulated Percent Hypoxia"
    data = dset58
    expr = intop1(c<=c_hypox)/intop1(1)
    unit = 1
  gev25: EvalGlobal "PMF PS No Diffusion Simulated Percent Hypoxia"
    data = dset61
    expr = intop1(c<=c_hypox)/intop1(1)
    unit = 1
  gev26: EvalGlobal "SF Radius Sweep Simulated Percent Hypoxia"
    data = dset68
    expr = intop3(c2<=c_hypox)/intop3(1)
    unit = 1
  gev27: EvalGlobal "SWP Radius Sweep Simulated Percent Hypoxia"
    data = dset75
    expr = intop4(c3<=c_hypox)/intop4(1)
    unit = 1
  gev28: EvalGlobal "PMF Radius Sweep Simulated Percent Hypoxia"
    data = dset79
    expr = intop1(c<=c_hypox)/intop1(1)
    unit = 1

Plots
  pg78: PlotGroup3D "SF Concentration" | data = dset50; typeintitle = off
    surf1: Surface (disabled) | expr = c2; descr = Concentration
    slc1: Slice | expr = c2; quickxnumber = 1
    arwl1: ArrowLine | expr = {tds2.tflux_c2x, tds2.tflux_c2y, tds2.tflux_c2z}
  pg79: PlotGroup3D "SWP Streamline" | data = dset54
    str1: Streamline
      expr = {tds3.tflux_c3x, tds3.tflux_c3y, tds3.tflux_c3z}
      pointtype = arrow
      arrowcount = 12
      arrowlength = logarithmic
      arrowscale = 9779976.884878589
      col: Color "Color Expression" | expr = c3; descr = Concentration
  pg80: PlotGroup3D "SWP Slice YZ" | data = dset54; typeintitle = off
    surf1: Surface (disabled) | expr = c3; descr = Concentration
    slc1: Slice | expr = c3; quickxnumber = 1; shift = -0.0058
  pg117: PlotGroup3D "SWP Slice XY" | data = dset54; typeintitle = off
    surf1: Surface (disabled) | expr = c3; descr = Concentration
    slc1: Slice | expr = c3; quickplane = xy; quickznumber = 1; shift = -0.0006
  pg81: PlotGroup3D "PMF Velocity" | data = dset55
    slc1: Slice | expr = spf2.U
  pg83: PlotGroup3D "PMF Streamline and Slice" | data = dset55
    str1: Streamline
      expr = {tds.tflux_c_PDMSx, tds.tflux_c_PDMSy, tds.tflux_c_PDMSz}
      descr = Total flux
      linetype = tube
      tuberadiusscale = 0.11555
      pointtype = arrow
      arrowcount = 58
      arrowlength = logarithmic
      arrowscale = 193152039.832
      col: Color "Color Expression" | expr = c_PDMS
    str2: Streamline
      expr = {tds4.tflux_c_mediax, tds4.tflux_c_mediay, tds4.tflux_c_mediaz}
      descr = Total flux
      linetype = tube
      tuberadiusscale = 0.11555
      pointtype = arrow
      arrowcount = 20
      arrowlength = logarithmic
      arrowscale = 133256.4401416062
      col: Color "Color Expression" | expr = c_media
    slc1: Slice | expr = c; quickxnumber = 1
  pg85: PlotGroup3D "PMF Streamline Media Only" | data = dset55
    str1: Streamline
      expr = {tds4.tflux_c_mediax, tds4.tflux_c_mediay, tds4.tflux_c_mediaz}
      descr = Total flux
      pointtype = arrow
      arrowcount = 66
      arrowlength = logarithmic
      arrowscale = 173064.56241390514
      col: Color "Color Expression" | expr = c_media
  pg86: PlotGroup3D "PMF YZ Plane" on domains 2, 4, 5 | data = dset55; typeintitle = off
    surf1: Surface (disabled) | expr = c
    slc1: Slice | expr = c; quickxnumber = 1; shift = 0.00175
    slc2: Slice | data = dset55; expr = c_PDMS; quickxnumber = 1; shift = 0.00175
  pg88: PlotGroup3D "PMF XY Plane" on domains 2, 4, 5 | data = dset55; typeintitle = off
    surf1: Surface (disabled) | expr = c
    slc1: Slice | expr = c; quickplane = xy; quickznumber = 1; shift = -0.00255
    slc2: Slice | data = dset55; expr = c_PDMS; quickplane = xy; quickznumber = 1; shift = -0.01+h_org+r_org
  pg118: PlotGroup3D "SF Radius Sweep Slice" | data = dset50; typeintitle = off
    surf1: Surface (disabled) | expr = c2; descr = Concentration
    slc1: Slice | expr = c2; quickxnumber = 1
    arwl1: ArrowLine (disabled) | expr = {tds2.tflux_c2x, tds2.tflux_c2y, tds2.tflux_c2z}
  pg109: PlotGroup3D "PMF Radius Sweep Velocity" | data = dset79
    slc1: Slice | expr = spf2.U
  pg113: PlotGroup3D "PMF Radius Sweep Streamline" | data = dset79
    str1: Streamline
      expr = {tds4.tflux_c_mediax, tds4.tflux_c_mediay, tds4.tflux_c_mediaz}
      descr = Total flux
      pointtype = arrow
      arrowcount = 73
      arrowlength = logarithmic
      arrowscale = 185032.0382196522
      col: Color "Color Expression" | expr = c_media
    str2: Streamline
      expr = {tds.tflux_c_PDMSx, tds.tflux_c_PDMSy, tds.tflux_c_PDMSz}
      descr = Total flux
      pointtype = arrow
      arrowcount = 59
      arrowlength = logarithmic
      arrowscale = 194272604.605
      col: Color "Color Expression" | expr = c_PDMS
  pg114: PlotGroup3D "PMF Radius Sweep Slice" on domains 2-6 | data = dset79; typeintitle = off
    slc1: Slice | expr = c; quickxnumber = 1; shift = 0.00175
  pg87: PlotGroup1D "PMF Radius Sweep Organoid Only Vertical Centerline" | data = cln2
    lngr1: LineGraph | expr = c
  pg73: PlotGroup1D "PMF Radius Sweep Whole Device Vertical Centerline" | data = cln7
    lngr1: LineGraph | expr = c
  pg89: PlotGroup3D "PMF PDMS Velocity" | data = dset58
    slc1: Slice | expr = spf2.U
  pg91: PlotGroup3D "PMF PDMS Diffusion Streamline" | data = dset58
    str1: Streamline
      expr = {tds.tflux_c_PDMSx, tds.tflux_c_PDMSy, tds.tflux_c_PDMSz}
      descr = Total flux
      linetype = tube
      tuberadiusscale = 0.11555
      pointtype = arrow
      arrowcount = 58
      arrowlength = logarithmic
      arrowscale = 193237247.194
      col: Color "Color Expression" | expr = c_PDMS
    str2: Streamline
      expr = {tds4.tflux_c_mediax, tds4.tflux_c_mediay, tds4.tflux_c_mediaz}
      descr = Total flux
      linetype = ribbon
      widthscale = 0.11555
      pointtype = arrow
      arrowcount = 16
      arrowlength = logarithmic
      arrowscale = 173842.74061878523
      col: Color "Color Expression" | expr = c_media
  pg94: PlotGroup3D "PMF PDMS Diffusion Slice" | data = dset58; typeintitle = off
    slc1: Slice | expr = c; quickxnumber = 1
  pg95: PlotGroup3D "PMF PS Velocity" | data = dset61
    slc1: Slice | expr = spf2.U; quickxnumber = 1
  pg97: PlotGroup3D "PMF PS No Diffusion Streamline" | data = dset61
    str1: Streamline
      expr = {tds.tflux_c_PDMSx, tds.tflux_c_PDMSy, tds.tflux_c_PDMSz}
      descr = Total flux
      linetype = tube
      tuberadiusscale = 0.11555
      pointtype = arrow
      arrowcount = 39
      arrowlength = logarithmic
      arrowscale = 1.38216147071e+15
      col: Color "Color Expression" | expr = c_PDMS
    str2: Streamline
      expr = {tds4.tflux_c_mediax, tds4.tflux_c_mediay, tds4.tflux_c_mediaz}
      descr = Total flux
      linetype = tube
      tuberadiusscale = 0.11555
      pointtype = arrow
      arrowcount = 20
      arrowlength = logarithmic
      arrowscale = 58907.228285374615
      col: Color "Color Expression" | expr = c_media
  pg100: PlotGroup3D "PMF PS No Diffusion Slice" on all domains | data = dset61; typeintitle = off
    slc1: Slice | expr = c_PDMS; quickxnumber = 1; shift = 0.00175
    slc2: Slice | expr = c_media; quickxnumber = 1; shift = 0.00175
  pg105: PlotGroup1D "PMF PDMS Organoid Vertical Centerline" | data = cln2
    lngr1: LineGraph | expr = c
  pg106: PlotGroup1D "PMF PDMS Whole Device Vertical Centerline" | data = cln3
    lngr1: LineGraph | expr = c
  pg107: PlotGroup1D "PMF PS Organoid Vertical Centerline" | data = cln4
    lngr1: LineGraph | expr = c
  pg108: PlotGroup1D "PMF PS Whole Device Vertical Centerline" | data = cln5
    lngr1: LineGraph | expr = c
  pg115: PlotGroup3D "PMF PS No Diffusion Slice Organoid Only" | data = dset61; typeintitle = off
    surf1: Surface (disabled) | expr = c_media
    slc1: Slice | expr = c; quickxnumber = 1
  pg116: PlotGroup3D "PMF PDMS Diffusion Slice Organoid Only" | data = dset58; typeintitle = off
    slc1: Slice | expr = c; quickxnumber = 1

Exports
  img13: Image "SF Slice"
    sourceobject = pg78
    size = manualweb
    unit = in
    width = 9
    height = 6.75
    sizedesc = 2700 x 2025 px
    pngfilename = /home1/eichenba/Downloads/Ahluwalia07282026/Spinner.png
  img17: Image "SWP YZ Slice"
    sourceobject = pg80
    size = manualweb
    unit = in
    width = 9
    height = 6.75
    sizedesc = 2700 x 2025 px
    pngfilename = /home1/eichenba/Downloads/Ahluwalia07282026/StaticFullwpSideFrame.png
  img18: Image "PMF Streamline and Slice"
    sourceobject = pg83
    size = manualweb
    unit = in
    width = 2
    height = 2
    sizedesc = 600 x 600 px
    pngfilename = /home1/eichenba/Downloads/Ahluwalia07282026/MFDStreamlineSmall.png
  img20: Image "PMF YZ Plane"
    sourceobject = pg86
    size = manualweb
    unit = in
    width = 2
    height = 2
    sizedesc = 600 x 600 px
    pngfilename = /home1/eichenba/Downloads/Ahluwalia07282026/MFDSliceSmall.png
  img21: Image "PMF XY Plane"
    sourceobject = pg88
    size = manualweb
    unit = in
    width = 2
    height = 2
    sizedesc = 600 x 600 px
    pngfilename = /home1/eichenba/Downloads/Ahluwalia07282026/MFDSliceSmallTop.png
  img22: Image "PMF PDMS Slice Whole Device"
    sourceobject = pg94
    size = manualweb
    unit = in
    width = 2
    height = 2
    sizedesc = 1200 x 1200 px
    pngfilename = /home1/eichenba/Downloads/Ahluwalia07282026/FlowSweep/Diffusion0pt0.png
  img23: Image "PMF PS Slice Whole Device"
    sourceobject = pg100
    size = manualweb
    unit = in
    width = 2
    height = 2
    sizedesc = 1200 x 1200 px
    pngfilename = /home1/eichenba/Downloads/Ahluwalia07282026/FlowSweep/NoDiffusion0pt0.png
  anim1: Animation "PMF PS Slice Org Only All" | type = imageseq; framesel = all; width = 1200; height = 1200
  anim3: Animation "PMF PDMS Slice Org Only All" | type = imageseq; framesel = all; width = 1200; height = 1200
  img24: Image "SWP XY"
    sourceobject = pg117
    size = manualweb
    unit = in
    width = 2
    height = 2
    sizedesc = 600 x 600 px
    pngfilename = /home1/eichenba/Downloads/Benchmarked/StaticXY.png
  img25: Image "SWP YZ Whole"
    sourceobject = pg80
    size = manualweb
    unit = in
    width = 2
    height = 2
    sizedesc = 600 x 600 px
    pngfilename = /home1/eichenba/Downloads/Benchmarked/StaticYZWholepng.png