// COMSOL Multiphysics 5.6.0.341 model "StaticDeviceNoLid.mph"
// Outline of the model tree

Parameters
  x_offset = 0[mm]  // Organoid distance from original placement
  r_org = 0.958E-3[m]  // organoid radius
  h_org = 3.01[mm]  // height of organoid base
  c_inlet = 0.186[mol/m^3]  // O2 Conc in Media (saturated in air)
  c_inc = 1.49[mol/m^3]  // surface PDMS conc
  D_P = 3.4e-9[m^2/s]  // Diffusion Constant O2 through PDMS
  V_max = 0.0036[mol/(m^3*s)]  // Max O2 Consumption Rate (approximation)
  K_m = 0.5e-3[mol/m^3]  // Michaelis-Menten constant for O3 consumption
  c_hypox = 0.05[mM]  // concentration of O2 for Hypoxic Tissue
  c_unit = 1[mM]  // makes heaviside function unitless
  v_spr = 1e-2[m/s]  // spring speed
  K_p = c_inc/c_inlet  // partition coefficient PDMS:Media
  c_unit1 = 1[mM/mm]  // unit value
  w = 0.01  // width for flc2hs

Variables
  var1 "Variables 1" on domains 1
    c = c_PDMS
  var2 "Variables 2" on domains 2-4
    c = c_media

Couplings
  intop1: Integration on domains 3
  intop2: Integration on domains 4
  genext1: GeneralExtrusion on domains 2
  genext2: GeneralExtrusion on domains 1

Coordinate systems
  sys3: Boundary "Boundary System 2"

Geometry
  geom3 "Geometry 3" (3D, length unit mm)
    wp2: WorkPlane | quickz = 3; unite = on
      r1: Rectangle | pos = {-4.760972835, -4.760972835}; size = {9.52194567, 9.52194567}
    ext2: Extrude | workplane = wp2; input = wp2; distance = 12; scale = {1.535747384, 1.535747384}
    uni1: Union | input = ext2; intbnd = off; face = all
    cone1: Cone | pos = {0, 2.4, 3}; r = 1.05; h = 1.5; ang = 12
    cone2: Cone | pos = {1.72 + x_offset, 1.97, 3}; ax2 = {0.0, 0.0}; r = 0.65; h = 1.5; ang = 12
    cone3: Cone | pos = {2.9 + x_offset, 1.34, 3}; r = 0.66; h = 1.5; ang = 12
    cone5: Cone | pos = {0.86 + x_offset, 1.23, 3}; r = 0.25; ang = 9
    cone6: Cone | pos = {0.62 + x_offset, 0.62, 3}; r = 0.25; ang = 9
    cone7: Cone | pos = {3.64 + x_offset, 0, 3}; ax2 = {0.0, 0.0}; r = 0.835; h = 1.5; ang = 12
    mir2: Mirror | input = cone1, cone2, cone3, cone5, cone6; keep = on; axis = {0, 1, 0}
    mir3: Mirror
      input = cone2, cone3, cone5, cone6, cone7, mir2(2), mir2(3), mir2(4), mir2(5)
      keep = on
      axis = {1, 0, 0}
    dif1: Difference | input = uni1; input2 = cone1, cone2, cone3, cone5, cone6, cone7, mir2, mir3
    pyr1: Pyramid | a = 25; b = 25; h = 15; rat = 0.74493
    sph1: Sphere | pos = {-1.75 - x_offset, 0, h_org + r_org}; r = r_org
    sph2: Sphere | pos = {1.75 + x_offset, 0, h_org+r_org}; r = r_org
    fin: Finalize "Form Union"

Materials
  mat2: Common "Water, liquid" on domains 2
    def "Basic"
      thermalexpansioncoefficient = alpha_p(T)
      bulkviscosity = muB(T)
      dynamicviscosity = eta(T)
      ratioofspecificheat = gamma_w(T)
      electricconductivity = 5.5e-6[S/m]
      heatcapacity = Cp(T)
      density = rho(T)
      thermalconductivity = k(T)
      soundspeed = cs(T)
      eta: Piecewise
        arg = T
        pieces = 
          {273.15, 413.15, 1.3799566804-0.021224019151*T^1+1.3604562827E-4*T^2-4.6454090319E-7*T^3+8.9042735735E-10*T^4-9.0790692686E-13*T^5+3.8457331488E-16*T^6}
          {413.15, 553.75, 0.00401235783-2.10746715E-5*T^1+3.85772275E-8*T^2-2.39730284E-11*T^3}
        argunit = K
        fununit = Pa*s
      Cp: Piecewise | arg = T; pieces = {273.15, 553.75, 12010.1471-80.4072879*T^1+0.309866854*T^2-5.38186884E-4*T^3+3.62536437E-7*T^4}; argunit = K; fununit = J/(kg*K)
      rho: Piecewise
        arg = T
        smooth = contd1
        pieces = 
          {273.15, 293.15, 6.3092789034e-05*T^3-0.0603676398829*T^2+18.9229382407066*T-950.704055329848}
          {293.15, 373.15, 1.0335053319e-05*T^3-0.0133950656345*T^2+4.96928883266*T+432.257114008512}
        argunit = K
        fununit = kg/m^3
      k: Piecewise | arg = T; pieces = {273.15, 553.75, -0.869083936+0.00894880345*T^1-1.58366345E-5*T^2+7.97543259E-9*T^3}; argunit = K; fununit = W/(m*K)
      cs: Interpolation | table = {{273, 1403}, {278, 1427}, {283, 1447}, {293, 1481}, {303, 1507}, {313, 1526}, {323, 1541}, {333, 1552}, {343, 1555}, {353, 1555}, {363, 1550}, {373, 1543}}; interp = piecewisecubic; argunit = K; fununit = m/s
      an1: Analytic | funcname = alpha_p; expr = -1/rho(T)*d(rho(T),T); args = T; argunit = K; fununit = 1/K
      an2: Analytic | funcname = gamma_w; expr = 1+(T/Cp(T))*(alpha_p(T)*cs(T))^2; args = T; argunit = K; fununit = 1
      an3: Analytic | funcname = muB; expr = 2.79*eta(T); args = T; argunit = K; fununit = Pa*s
  mat3: Common "Organoid Tissue" on domains 1, 3, 4
    def "Basic"
      density = 1050
      diffusion = 1.7e-9
      dynamicviscosity = 0.001
  mat4: Common "PDMS" on domains 1
    def "Basic"
      density = 1.03[g/cm^3]
      diffusion = D_P
      dynamicviscosity = 0

Physics
  tds: DilutedSpecies "Oxygen TDS in PDMS" on domains 1
    dependent variable c_PDMS
    cdm1: ConvectionDiffusionMigration "Transport Properties 1" (default)
      DiffusionMaterialList = mat2
      D_c_PDMS = 3.0e-9[m^2/s]
    nflx1: NoFlux (default)
    init1: init "Initial Values 1" (default) | initc = c_inc-0.001
    conc1: Concentration on boundaries 1, 3-5, 128 | species = 1; c0 = c_inc
    cdm3: ConvectionDiffusionMigration "Transport Properties PDMS" on domains 1
      DiffusionMaterialList = mat4
      D_c_PDMS = D_P
    fl1: FluxBoundary "Stiff Spring PDMS Side" on boundaries 6-25, 30-35, 40-89, 94-107, 112-127
      species = 1
      J0 = v_spr*(genext1(c_media)-c_PDMS/K_p)
  tds4: DilutedSpecies "Oxygen TDS in Media & Organoids" on domains 2-4
    dependent variable c_media
    cdm1: ConvectionDiffusionMigration "Transport Properties 1" (default)
      DiffusionMaterialList = mat2
      D_c_media = 3.4e-9
    nflx1: NoFlux (default)
    init1: init "Initial Values 1" (default) | initc = c_inlet-0.001
    fl1: FluxBoundary "Stiff Spring Media Side" on boundaries 6, 8-25, 30-35, 40-89, 94-107, 112-127
      species = 1
      J0 = v_spr*(genext2(c_PDMS)/K_p-c_media)
    reac1: Reactions on domains 3, 4 | R_c_media = -(V_max*c)/(c+K_m)*flc2hs(c/c_hypox-1, 0.005)
    cdm2: ConvectionDiffusionMigration "Transport Properties Organoids" on domains 3, 4 | D_c_media = 3.25e-9[m^2/s]
    conc1: Concentration on boundaries 7 | species = 1; c0 = c_inlet
    sym1: Symmetry (disabled) on no boundaries

Mesh
  mesh3 "Mesh 3"
    size: MeshSizeDefault | hmax = 2.5; hmin = 0.45; hcurve = 0.6; hnarrow = 0.5; hgrad = 1.5
    size1: Size "Size 1 General" on domains 1-4 | table = cfd; hmax = 0.5; hgrad = 1.5; hauto = 3; custom = on
    size2: Size on no domains | hauto = 1
    size4: Size on boundaries 5-127 | hmax = 0.07; custom = on
    size3: Size on edges 9-284 | hmax = 0.01; custom = on
    cr1: CornerRefinement on domains 1, 2 | boundary = boundaries 5, 7, 8
    ftet1: FreeTet "Free Tetrahedral 1" on remaining entities
    bl1: BndLayer "Boundary Layers 1" (disabled) on entire geometry | sharpcorners = trim
      blp: BndLayerProp "Boundary Layer Properties" on boundaries 5-8 | inittype = blhmin; blhmin = 0.05

Studies
  std25 "Timestep 0 0.001 0.01"
    time: Transient "Time Dependent" | tlist = 0, 0.001, 0.01
  std26 "Timestep Up to 1 min"
    time: Transient "Time Dependent"
      tlist = 0.01, 0.1, 1, 0.1[min], 1[min]
      useinitsol = on
      initmethod = sol
      initstudy = std25
  std30 "Stationary"
    stat: Stationary | useinitsol = on; initmethod = sol; initstudy = std26

Solver configurations
  sol33 "Solution 33" (study std25)
    v1: Variables "Dependent Variables 1"
    t1: Time "Time-Dependent Solver 1" | tlist = 0, 0.001, 0.01; rtol = 0.005; maxorder = 2; stabcntrl = on
      se1: Segregated | segstabacc = segaacc; segaaccdim = 5; segaaccmix = 0.9; segaaccdelay = 1
        ss1: SegregatedStep "Concentration c_PDMS" | linsolver = i1; subdamp = 0.8; subjtech = once
        ss2: SegregatedStep "Concentration c_media" | linsolver = i2; subdamp = 0.8; subjtech = once
      i1: Iterative "AMG, concentrations (tds)" | maxlinit = 50
        mg1: Multigrid | prefun = saamg; maxcoarsedof = 50000; saamgcompwise = on
      i2: Iterative "AMG, concentrations (tds4)" | maxlinit = 50
        mg1: Multigrid | prefun = saamg; maxcoarsedof = 50000; saamgcompwise = on
  sol34 "Solution 34" (study std26)
    v1: Variables "Dependent Variables 1" | initmethod = sol
    t1: Time "Time-Dependent Solver 1"
      tlist = 0.01, 0.1, 1, 0.1[min], 1[min]
      rtol = 0.005
      maxorder = 2
      stabcntrl = on
      se1: Segregated | segstabacc = segaacc; segaaccdim = 5; segaaccmix = 0.9; segaaccdelay = 1
        ss1: SegregatedStep "Concentration c_PDMS" | linsolver = i1; subdamp = 0.8; subjtech = once
        ss2: SegregatedStep "Concentration c_media" | linsolver = i2; subdamp = 0.8; subjtech = once
      i1: Iterative "AMG, concentrations (tds)" | maxlinit = 50
        mg1: Multigrid | prefun = saamg; maxcoarsedof = 50000; saamgcompwise = on
      i2: Iterative "AMG, concentrations (tds4)" | maxlinit = 50
        mg1: Multigrid | prefun = saamg; maxcoarsedof = 50000; saamgcompwise = on
  sol38 "Solution 38" (study std30)
    v1: Variables "Dependent Variables 1" | initmethod = sol
    s1: Stationary "Stationary Solver 1"
      se1: Segregated
        ss1: SegregatedStep "Concentration c_PDMS"
          linsolver = i1
          subdamp = 0.35
          subtermconst = itertol
          subiter = 3
          subntolfact = 1
        ss2: SegregatedStep "Concentration c_media"
          linsolver = i2
          subdamp = 0.35
          subtermconst = itertol
          subiter = 3
          subntolfact = 1
      i1: Iterative "AMG, concentrations (tds)" | nlinnormuse = on; maxlinit = 1000
        mg1: Multigrid | prefun = saamg; maxcoarsedof = 50000; saamgcompwise = on
      i2: Iterative "AMG, concentrations (tds4)" | nlinnormuse = on; maxlinit = 1000
        mg1: Multigrid | prefun = saamg; maxcoarsedof = 50000; saamgcompwise = on

Datasets
  dset5: Solution | solution = sol33
  dset6: Solution | solution = sol34
  dset10: Solution | solution = sol38
  cln2: CutLine3D "Organoid Midline X Axis"
    data = dset10
    genpoints = {{-r_org+0.00175, 0, r_org+h_org}, {r_org+0.00175, 0, r_org+h_org}}
  cln3: CutLine3D "Organoid Midline Y Axis"
    data = dset10
    genpoints = {{1.75, -r_org, r_org+h_org}, {1.75, r_org, r_org+h_org}}
    spacevars = cln2x
  cln4: CutLine3D "Organoid Midline Z Axis"
    data = dset10
    genpoints = {{1.75, 0, h_org}, {1.75, 0, 2*r_org+h_org}}
    spacevars = cln2x

Derived values
  int1: IntSurface "Surface Integration For Partition Coefficient" on boundaries 6, 8, 10, 11, 13, 14, 16, 17, 20, 22, 23, 30, 31, 34, 40, 41, 44, 45, 48, 49, 52, 54, 55, 58, 59, 62, 64, 66, 67
    data = dset10
    expr = {v_spr*(genext2(c_PDMS)/K_p-c_media), v_spr*(genext1(c_media)-c_PDMS/K_p)}
    unit = {mol/s, mol/s}
  gev1: EvalGlobal "Simulated Percent Hypoxia" | data = dset10; expr = intop1(c<=c_hypox)/intop1(1); unit = 1

Plots
  pg4: PlotGroup3D "Concentration, Whole Device" | data = dset6; typeintitle = off
    slc1: Slice | expr = c_PDMS; quickplane = zx; quickynumber = 1
    slc2: Slice | expr = c_media; quickplane = zx; quickynumber = 1
  pg19: PlotGroup1D "Concentration Midlines Through Organoid"
    data = cln2
    xlabel = X-coordinate (mm)
    ylabel = O2 Concentration (mM)
    lngr1: LineGraph | expr = c
    lngr2: LineGraph | data = cln3; expr = c
    lngr3: LineGraph | data = cln4; expr = c
  pg20: PlotGroup1D "Heaviside Function" | data = cln2
    lngr1: LineGraph | expr = flc2hs(c/c_hypox-1,0.5)
    lngr2: LineGraph (disabled) | data = cln3; expr = c
  pg23: PlotGroup3D "Concentration, Streamlines" | data = dset10
    str1: Streamline
      expr = {tds4.tflux_c_mediax, tds4.tflux_c_mediay, tds4.tflux_c_mediaz}
      linetype = tube
      tuberadiusscale = 0.1
      pointtype = arrow
      arrowcount = 32
      arrowlength = logarithmic
      arrowscale = 65577768.2276
      col: Color "Color Expression" | expr = c_media
    str2: Streamline
      data = dset10
      expr = {tds.tflux_c_PDMSx, tds.tflux_c_PDMSy, tds.tflux_c_PDMSz}
      linetype = tube
      tuberadiusscale = 0.1
      pointtype = arrow
      arrowcount = 50
      arrowlength = logarithmic
      arrowscale = 69735966.2152
      col: Color "Color Expression" | expr = c_PDMS; descr = Concentration
  pg24: PlotGroup3D "Concentration, Organoid Only" on domains 3 | data = dset10; typeintitle = off
    slc1: Slice | expr = c_media; quickxnumber = 1

Exports
  img3: Image "YZ Static"
    size = manualweb
    unit = px
    width = 1200
    height = 1200
    sizedesc = 51 x 51 mm
    pngfilename = /home1/eichenba/Downloads/Static/yzStatic.png
  img4: Image "XY Static"
    size = manualweb
    unit = px
    width = 1200
    height = 1200
    sizedesc = 51 x 51 mm
    pngfilename = /home1/eichenba/Downloads/Static/xyStatic.png
  data1: Data | data = cln2; expr = c; unit = mol/m^3; filename = /home1/eichenba/Downloads/StaticXaxis.txt
  data2: Data | data = cln3; expr = c; unit = mol/m^3; filename = /home1/eichenba/Downloads/StaticYaxis.txt
  data3: Data | data = cln3; expr = c; unit = mol/m^3; filename = /home1/eichenba/Downloads/StaticZaxis.txt
  img5: Image "Organoid Concentration Slice"
    sourceobject = pg24
    size = manualweb
    unit = mm
    width = 50
    height = 50
    pngfilename = /home1/eichenba/Downloads/Static/OrganoidXY.png
  img6: Image "Streamlines"
    sourceobject = pg23
    size = manualweb
    unit = mm
    width = 50
    height = 50
    pngfilename = /home1/eichenba/Downloads/Static/Streamline.png